<?xml version="1.0"?>
<!--
  File:     ROTAX912S.xml
  Author:   Aero-Matic v 0.83

  Inputs:
    name:           ROTAX912S
    type:           piston
    power:          100 hp
    augmented?      no
    injected?       no
-->

<piston_engine name="ROTAX912S">
  <minmp unit="INHG">         11.0 </minmp>
  <maxmp unit="INHG">         29.92 </maxmp>
  <displacement unit="IN3"> 82.6 </displacement>
  <maxhp>        100.00 </maxhp>
  <cycles>         4.0 </cycles>
  <idlerpm>      1000.0 </idlerpm>
  <maxrpm>      5800.0 </maxrpm>
  <sparkfaildrop>  0.1 </sparkfaildrop>
  <volumetric-efficiency> 0.90 </volumetric-efficiency>
  <man-press-lag> 0.1 </man-press-lag>
  <static-friction unit="HP"> 0.50 </static-friction>
  <starter-torque> 80.00 </starter-torque>
  <starter-rpm> 1400 </starter-rpm>
  <!-- Defining <bsfc> over-rides the built-in horsepower calculations -->
  <!--<bsfc>           0.45 </bsfc>-->
  <stroke unit="IN">  2.4 </stroke>
  <bore unit="IN">    3.31 </bore>
  <cylinders>         4.0  </cylinders>
  <compression-ratio>  10.5 </compression-ratio>

  <!-- Heating and cooling is done in rotax-thermal.xml -->
  <cylinder-head-mass unit="LBS"> 13.0 </cylinder-head-mass>
  <cooling-factor> 1 </cooling-factor>
  <oil-cooling-factor> 1 </oil-cooling-factor>
</piston_engine>
