<?xml version="1.0" encoding="UTF-8"?>
<flight_control name="FCS: TL96">

    <channel name="Pitch">

        <summer name="Pitch Trim Sum">
            <input>fcs/elevator-cmd-norm</input>
            <input>fcs/pitch-trim-cmd-norm</input>
            <clipto>
                <min> -1 </min>
                <max> 1 </max>
            </clipto>
        </summer>

        <aerosurface_scale name="Elevator Control">
            <input>fcs/pitch-trim-sum</input>
            <range>
                <min> -0.10 </min>
                <max> 0.10 </max>
            </range>
            <output>fcs/elevator-pos-rad</output>
        </aerosurface_scale>

        <aerosurface_scale name="elevator normalization">
            <input>fcs/elevator-pos-rad</input>
            <domain>
                <min> -0.10 </min>
                <max> 0.10 </max>
            </domain>
            <range>
                <min> -1 </min>
                <max> 1 </max>
            </range>
            <output>fcs/elevator-pos-norm</output>
        </aerosurface_scale>

    </channel>

    <channel name="Roll">

        <summer name="Roll Trim Sum">
            <input>fcs/aileron-cmd-norm</input>
            <input>fcs/roll-trim-cmd-norm</input>
            <clipto>
                <min> -1 </min>
                <max> 1 </max>
            </clipto>
        </summer>

        <aerosurface_scale name="Left Aileron Control">
            <input>fcs/roll-trim-sum</input>
            <range>
                <min> -0.10 </min>
                <max> 0.10 </max>
            </range>
            <output>fcs/left-aileron-pos-rad</output>
        </aerosurface_scale>

        <aerosurface_scale name="Right Aileron Control">
            <input>fcs/roll-trim-sum</input>
            <range>
                <min> -0.10 </min>
                <max> 0.10 </max>
            </range>
            <output>fcs/right-aileron-pos-rad</output>
        </aerosurface_scale>

        <aerosurface_scale name="left aileron normalization">
            <input>fcs/left-aileron-pos-rad</input>
            <domain>
                <min> -0.10 </min>
                <max> 0.10 </max>
            </domain>
            <range>
                <min> -1 </min>
                <max> 1 </max>
            </range>
            <output>fcs/left-aileron-pos-norm</output>
        </aerosurface_scale>

        <aerosurface_scale name="right aileron normalization">
            <input>fcs/right-aileron-pos-rad</input>
            <domain>
                <min> -0.10 </min>
                <max> 0.10 </max>
            </domain>
            <range>
                <min> -1 </min>
                <max> 1 </max>
            </range>
            <output>fcs/right-aileron-pos-norm</output>
        </aerosurface_scale>

    </channel>

    <channel name="Yaw">

        <summer name="Rudder Command Sum">
            <input>fcs/rudder-cmd-norm</input>
            <input>fcs/yaw-trim-cmd-norm</input>
            <clipto>
                <min> -1 </min>
                <max> 1 </max>
            </clipto>
        </summer>

        <aerosurface_scale name="Rudder Control">
            <input>fcs/rudder-command-sum</input>
            <range>
                <min> -0.10 </min>
                <max> 0.10 </max>
            </range>
            <output>fcs/rudder-pos-rad</output>
        </aerosurface_scale>

        <aerosurface_scale name="rudder normalization">
            <input>fcs/rudder-pos-rad</input>
            <domain>
                <min> -0.10 </min>
                <max> 0.10 </max>
            </domain>
            <range>
                <min> -1 </min>
                <max> 1 </max>
            </range>
            <output>fcs/rudder-pos-norm</output>
        </aerosurface_scale>

    </channel>

    <channel name="Flaps">
        <kinematic name="Flaps Control">
            <input>fcs/flap-cmd-norm</input>
            <traverse>
                <setting>
                    <position> 0 </position>
                    <time> 0 </time>
                </setting>
                <setting>
                    <position> 15 </position>
                    <time> 4 </time>
                </setting>
                <setting>
                    <position> 30 </position>
                    <time> 3 </time>
                </setting>
            </traverse>
            <output>fcs/flap-pos-deg</output>
        </kinematic>

        <aerosurface_scale name="flap normalization">
            <input>fcs/flap-pos-deg</input>
            <domain>
                <min> 0 </min>
                <max> 30 </max>
            </domain>
            <range>
                <min> 0 </min>
                <max> 1 </max>
            </range>
            <output>fcs/flap-pos-norm</output>
        </aerosurface_scale>

    </channel>

    <channel name="Landing Gear"></channel>

    <channel name="Speedbrake">
        <kinematic name="Speedbrake Control">
            <input>fcs/speedbrake-cmd-norm</input>
            <traverse>
                <setting>
                    <position> 0 </position>
                    <time> 0 </time>
                </setting>
                <setting>
                    <position> 1 </position>
                    <time> 1 </time>
                </setting>
            </traverse>
            <output>fcs/speedbrake-pos-norm</output>
        </kinematic>

    </channel>

</flight_control>
